// SBML level 3 version 1
// Created with https://github.com/matthiaskoenig/sbmlutils.

model simvastatin_intestine(CYP3A4_Km, SIMVA_CYP3A4LI_Vmax, SIMMETSCLKI_k, Vext, Vint, Vfeces, simva_ext, simacid_ext, simmets_ext, simva, simacid, simmets, simmets_feces)
  // Model for intestinal/gut simvastatin metabolism
  // Simvastatin is taken up via absorption and appears within the intestinal wall cells. The absorption processes are modeled in the whole-body model.
  // Simvastatin can be converted to simvastatin metabolites by CYP3A4 (first pass metabolism).
  // The possible conversion simvastatin -> simvastatin acid (esterases) and simvastatin acid -> simvastatin metabolites are assumed to mainly take place in the liver, and are not modeled explicitly.
  // Simvastatin is transported irreversible.
  // Only simvastatin metabolites are found in feces. Irreversible clearance reaction.
  // The content of this model has been carefully created in a manual research effort.
  // Terms of use
  // Copyright © 2021 Matthias König.
  // This work is licensed under a Creative Commons Attribution 4.0 International License.
  // Redistribution and use of any part of this model, with or without modification, are permitted provided that the following conditions are met:
  // Redistributions of this SBML file must retain the above copyright notice, this list of conditions and the following disclaimer.
  // Redistributions in a different form must reproduce the above copyright notice, this list of conditions and the following disclaimer in the documentation and/or other materials provided with the distribution.
  // This model is distributed in the hope that it will be useful, but WITHOUT ANY WARRANTY; without even the implied warranty of MERCHANTABILITY or FITNESS FOR A PARTICULAR PURPOSE.
  // model units - substance: mmole, time: min, volume: litre, area: m2, length: metre, extent: mmole

  // Compartments:
  compartment Vext = 1 litre; Vext is "plasma";  // SBO:0000290 FMA:62970 ncit:C13356 BTO:0000131
  compartment Vint = 1 litre; Vint is "intestine";  // SBO:0000290 FMA:7199 ncit:C12736 BTO:0000648
  compartment Vfeces = 1 litre;  // SBO:0000290 FMA:64183 ncit:C13234 BTO:0000440

  // Species:
  species simva_ext in Vext = 0; simva_ext is "simvastatin (plasma)";  // SBO:0000247 ncit:C29454 CHEBI:9150 omit:0019802
  species simacid_ext in Vext = 0; simacid_ext is "simvastatin acid (plasma)";  // SBO:0000247 ncit:C96309 pubchem.substance:64718 inchikey:XWLXKKNPFMNSFA-HGQWONQESA-N
  species simmets_ext in Vext = 0; simmets_ext is "simvastatin metabolites (blood)";  // SBO:0000247
  species simva in Vint = 0; simva is "simvastatin (intestine)";  // SBO:0000247 ncit:C29454 CHEBI:9150 omit:0019802
  species simacid in Vint = 0; simacid is "simvastatin acid (intestine)";  // SBO:0000247 ncit:C96309 pubchem.substance:64718 inchikey:XWLXKKNPFMNSFA-HGQWONQESA-N
  species simmets in Vint = 0; simmets is "simvastatin metabolites (intestine)";  // SBO:0000247
  substanceOnly species simmets_feces in Vfeces = 0; simmets_feces is "simvastatin metabolites (feces)";  // SBO:0000247

  // Parameters:
  CYP3A4_Km = 0.025 mM; CYP3A4_Km is "Km CYP3A4";  // SBO:0000322
  SIMVA_CYP3A4LI_Vmax = 1 mmole_per_min_l; SIMVA_CYP3A4LI_Vmax is "Vmax CYP3A4";  // SBO:0000186
  SIMMETSCLKI_k = 0.01 per_min; SIMMETSCLKI_k is "scaling of renal and fecal clearance";  // SBO:0000009
  // assumptions
  // identical metabolism in liver and intestine
  SIMVA_CYP3A4_f = 1 dimensionless; SIMVA_CYP3A4_f is "scaling of intestinal Vmax CYP3A4 relative to liver";  // SBO:0000002
  SIMVA_CYP3A4GU_Vmax has mmole_per_min_l; SIMVA_CYP3A4GU_Vmax is "Vmax for CYP3A4 metabolism";
  // Assuming identical Km then OATP1B1 in liver for simvastatin lactone 9.7 µM (Chen et al., 2005)
  SIMVAEXP_Km = 0.0097 mM; SIMVAEXP_Km is "Km simvastatin export";  // SBO:0000322
  SIMVAEXP_f = 100 dimensionless; SIMVAEXP_f is "scaling simvastatin export";  // SBO:0000002
  // Assuming identical Km then OATP1B1 in liver: Simvastatin acid 3.6 µM (Nakai et al., 2001; Chen et al., 2005)
  SIMACIDEXP_Km = 0.0036 mM; SIMACIDEXP_Km is "Km simvastatin acid export";  // SBO:0000322
  SIMACIDEXP_f = 100 dimensionless; SIMACIDEXP_f is "scaling simvastatin acid export";  // SBO:0000002
  SIMMETSEXP_Km = 0.0067 mM; SIMMETSEXP_Km is "Km simvastatin metabolite export";  // SBO:0000322
  SIMMETSEXP_f = 100 dimensionless; SIMMETSEXP_f is "scaling simvastatin metabolite export";  // SBO:0000002
  SIMACID_CYP3A4_f = 1 dimensionless; SIMACID_CYP3A4_f is "scaling of CYP3A4 activity";  // SBO:0000002
  SIMMETSCL_f = 1 dimensionless; SIMMETSCL_f is "scaling fecal simvastatin clearance";  // SBO:0000002

  // Assignment rules:
  SIMVA_CYP3A4GU_Vmax := SIMVA_CYP3A4LI_Vmax*SIMVA_CYP3A4_f;

  // Reactions:
  SIMVAEXP: simva => simva_ext; Vint*SIMVA_CYP3A4GU_Vmax*SIMVAEXP_f*simva/(SIMVAEXP_Km + simva); SIMVAEXP is "SV export";  // SBO:0000655
  SIMACIDEXP: simacid => simacid_ext; Vint*SIMVA_CYP3A4GU_Vmax*SIMACIDEXP_f*simacid/(simacid + SIMACIDEXP_Km); SIMACIDEXP is "SVA export";  // SBO:0000655
  // assuming identical Km then OATP1B1 in liver Simvastatin acid 3.6 µM (Nakai et al., 2001; Chen et al., 2005) Simvastatin lactone 9.7 µM (Chen et al., 2005)
  SIMMETSEXP: simmets => simmets_ext; Vint*SIMVA_CYP3A4GU_Vmax*SIMMETSEXP_f*simmets/(simmets + SIMMETSEXP_Km); SIMMETSEXP is "SVM export";  // SBO:0000655
  // CYP3A4: identical Km for simvastatin and simvastatin acid assumed
  SIMVA_CYP3A4: simva => simmets; Vint*SIMVA_CYP3A4GU_Vmax*simva/(simva + CYP3A4_Km); SIMVA_CYP3A4 is "CYP3A4: SV to SVM";  // SBO:0000176
  // CYP3A4: identical Km for simvastatin and simvastatin acid assumed
  // see Lilja2004: when applying grapefruit juice (CYP3A4 inhibitor in small intestinal wall) -> AUC SV, SVA increases -> CYP3A4 conversion from SV+SVA to SVM takes place!
  SIMACID_CYP3A4: simacid => simmets; Vint*SIMVA_CYP3A4GU_Vmax*SIMACID_CYP3A4_f*simacid/(simacid + CYP3A4_Km); SIMACID_CYP3A4 is "CYP3A4: SVA to SVM";  // SBO:0000176
  // Clearance reaction into feces for simvastatin acid metabolites assumption: no excretion of simva and simacid how much of the enterohepatic circulation is removed to the feces (< 100% recirculate to liver)
  SIMMETSCL: simmets => simmets_feces; Vint*SIMMETSCLKI_k*SIMMETSCL_f*simmets; SIMMETSCL is "fecal SVM clearance";  // SBO:0000655

  // Unit definitions:
  unit kg = 1000 gram; kg is "kilogram";
  unit l_per_min = litre / (60 second); l_per_min is "l/min";
  unit l_per_min_kg = litre / (60 second * 1000 gram); l_per_min_kg is "l/min/kg";
  unit m2 = metre^2; m2 is "meter^2";
  unit mM = 1e-3 mole / litre; mM is "mmole/liter";
  unit min = 60 second;
  unit mmole = 1e-3 mole;
  unit mmole_per_min = 1e-3 mole / (60 second); mmole_per_min is "mmole/min";
  unit mmole_per_min_l = 1e-3 mole / (60 second * litre); mmole_per_min_l is "mmole/min/l";
  unit per_min = 1 / (60 second); per_min is "1/min";
end
