// SBML level 3 version 1
// Created with https://github.com/matthiaskoenig/sbmlutils.

model simvastatin_kidney(SIMMETSCLKI_k, Vext, Vki, Vurine, simmets_ext, simmets_urine)
  // Model for simvastatin excretion via the kidney
  // Only simvastatin metabolites are excreted in the urine.
  // No unchanged simvastatin and simvastatin acid are excreted in the urine.
  // The content of this model has been carefully created in a manual research effort.
  // Terms of use
  // Copyright © 2021 Matthias König.
  // This work is licensed under a Creative Commons Attribution 4.0 International License.
  // Redistribution and use of any part of this model, with or without modification, are permitted provided that the following conditions are met:
  // Redistributions of this SBML file must retain the above copyright notice, this list of conditions and the following disclaimer.
  // Redistributions in a different form must reproduce the above copyright notice, this list of conditions and the following disclaimer in the documentation and/or other materials provided with the distribution.
  // This model is distributed in the hope that it will be useful, but WITHOUT ANY WARRANTY; without even the implied warranty of MERCHANTABILITY or FITNESS FOR A PARTICULAR PURPOSE.
  // model units - substance: mmole, time: min, volume: litre, area: m2, length: metre, extent: mmole

  // Compartments:
  compartment Vext = 1 litre; Vext is "plasma";  // SBO:0000290 FMA:62970 ncit:C13356 BTO:0000131
  compartment Vki = 1 litre; Vki is "kidney";  // SBO:0000290 FMA:7203 ncit:C12415 BTO:0000671
  compartment Vurine = 1 litre;  // SBO:0000290 FMA:12274 ncit:C13283 BTO:0001088

  // Species:
  species simmets_ext in Vext = 0; simmets_ext is "simvastatin metabolites (plasma)";  // SBO:0000247
  substanceOnly species simmets_urine in Vurine = 0; simmets_urine is "simvastatin metabolites (urine)";  // SBO:0000247

  // Parameters:
  SIMMETSCLKI_k = 0.01 per_min; SIMMETSCLKI_k is "scaling of renal and fecal clearance";  // SBO:0000009

  // Reactions:
  SIMMETSCL: simmets_ext => simmets_urine; Vki*SIMMETSCLKI_k*simmets_ext; SIMMETSCL is "urinary SVM clearance";  // SBO:0000655

  // Unit definitions:
  unit kg = 1000 gram; kg is "kilogram";
  unit l_per_min = litre / (60 second); l_per_min is "l/min";
  unit l_per_min_kg = litre / (60 second * 1000 gram); l_per_min_kg is "l/min/kg";
  unit m2 = metre^2; m2 is "meter^2";
  unit mM = 1e-3 mole / litre; mM is "mmole/liter";
  unit min = 60 second;
  unit mmole = 1e-3 mole;
  unit mmole_per_min = 1e-3 mole / (60 second); mmole_per_min is "mmole/min";
  unit mmole_per_min_l = 1e-3 mole / (60 second * litre); mmole_per_min_l is "mmole/min/l";
  unit per_min = 1 / (60 second); per_min is "1/min";
end
