// SBML level 3 version 1
// Created with https://github.com/matthiaskoenig/sbmlutils.

model simvastatin_liver(CYP3A4_Km, SIMVA_CYP3A4LI_Vmax, conversion_min_per_day, simmets_inhibitor_activity, Mr_ldlc, v_cho_ref, Vext, Vli, Vint, Vli_membrane, simva_ext, simacid_ext, simmets_ext, simmets_gu, ldlc_ext, acoa, hmgcoa, cho, v_net_export, v_liver_balance)
  // Model for simvastatin and cholesterol metabolism in the liver
  // The content of this model has been carefully created in a manual research effort.
  // Terms of use
  // Copyright © 2021 Matthias König.
  // This work is licensed under a Creative Commons Attribution 4.0 International License.
  // Redistribution and use of any part of this model, with or without modification, are permitted provided that the following conditions are met:
  // Redistributions of this SBML file must retain the above copyright notice, this list of conditions and the following disclaimer.
  // Redistributions in a different form must reproduce the above copyright notice, this list of conditions and the following disclaimer in the documentation and/or other materials provided with the distribution.
  // This model is distributed in the hope that it will be useful, but WITHOUT ANY WARRANTY; without even the implied warranty of MERCHANTABILITY or FITNESS FOR A PARTICULAR PURPOSE.
  // model units - substance: mmole, time: min, volume: litre, area: m2, length: metre, extent: mmole

  // Compartments:
  compartment Vext = 1 litre; Vext is "plasma";  // SBO:0000290 FMA:62970 ncit:C13356 BTO:0000131
  compartment Vli = 1.5 litre; Vli is "liver";  // SBO:0000290 FMA:7197 BTO:0000759 ncit:C12392
  compartment Vint = 1 litre; Vint is "intestine";  // SBO:0000290 FMA:7199 ncit:C12736 BTO:0000648
  compartment Vli_membrane = 1 litre; Vli_membrane is "liver membrane";  // SBO:0000290

  // Species:
  species simacid in Vli = 0; simacid is "simvastatin acid (liver)";  // SBO:0000247 ncit:C96309 pubchem.substance:64718 inchikey:XWLXKKNPFMNSFA-HGQWONQESA-N
  species simmets in Vli = 0; simmets is "simvastatin metabolites (liver)";  // SBO:0000247
  species $simva_ext in Vext = 0; simva_ext is "simvastatin (plasma)";  // SBO:0000247 ncit:C29454 CHEBI:9150 omit:0019802
  species simacid_ext in Vext = 0; simacid_ext is "simvastatin acid (plasma)";  // SBO:0000247 ncit:C96309 pubchem.substance:64718 inchikey:XWLXKKNPFMNSFA-HGQWONQESA-N
  species simmets_ext in Vext = 0; simmets_ext is "simvastatin metabolites (plasma)";  // SBO:0000247
  species simva in Vli = 0; simva is "simvastatin (liver)";  // SBO:0000247 ncit:C29454 CHEBI:9150 omit:0019802
  species simmets_gu in Vint = 0; simmets_gu is "simvastatin metabolites (gut)";  // SBO:0000247
  // reference values from studies (normal ranges ~3 mM)
  species $ldlc_ext in Vext = 3; ldlc_ext is "ldl-cholesterol (plasma)";  // SBO:0000296 efo:0004195 CHEBI:47774
  // 0.043 ± 0.031 mM Corkey1988; 0.028 - 0.081 [mM] Lumbers1969
  species $acoa in Vli = 0.043; acoa is "acetyl-CoA (liver)";  // SBO:0000247 CHEBI:15351
  // 0.022 ± 0.027 [mM] Corkey1988
  species hmgcoa in Vli = 0.022; hmgcoa is "HMG-CoA (liver)";  // SBO:0000247 ncit:C129007 CHEBI:15467
  // 5.8 - 160 [µmol/l] [Chuang2017]; mice ~ 8.17 [µmol/l] [Rudling1997]; rat reference point 0.020 with variation [0.01 - 0.100]
  species cho in Vli = 0.02; cho is "cholesterol (liver)";  // SBO:0000247 CHEBI:16113 ncit:C369
  substanceOnly species hmgcoareductase in Vli = 1*Vli; hmgcoareductase is "HMG-CoA reductase (liver)";  // substance in dimensionless; conversionFactor cf_units_per_mmole; SBO:0000245 ncit:C54701
  substanceOnly species hmgcoasynthase in Vli = 1*Vli; hmgcoasynthase is "HMG-CoA synthase (liver)";  // substance in dimensionless; conversionFactor cf_units_per_mmole; SBO:0000245
  substanceOnly species ldlr in Vli = 0.3333333*Vli; ldlr is "LDLR";  // substance in dimensionless; conversionFactor cf_units_per_mmole; SBO:0000245 ncit:C17074
  substanceOnly species ldlr_membrane in Vli_membrane = 0.3333333*Vli_membrane; ldlr_membrane is "LDLR membrane";  // substance in dimensionless; conversionFactor cf_units_per_mmole; SBO:0000245
  substanceOnly species ldlr_ldlc in Vli = 0.3333333*Vli; ldlr_ldlc is "LDLR-LDLC complex";  // substance in dimensionless; conversionFactor cf_units_per_mmole; SBO:0000296
  // Species added for tracking degradation of LDLR.
  substanceOnly species ldlr_degraded in Vli = 0; ldlr_degraded is "LDLR degraded";  // substance in dimensionless; conversionFactor cf_units_per_mmole; SBO:0000245

  // Parameters:
  CYP3A4_Km = 0.025 mM; CYP3A4_Km is "Km CYP3A4";  // SBO:0000322
  SIMVA_CYP3A4LI_Vmax = 1 mmole_per_min_l; SIMVA_CYP3A4LI_Vmax is "Vmax CYP3A4";  // SBO:0000186
  cf_units_per_mmole = 1 per_mmole; cf_units_per_mmole is "conversion factor for dimensionless species";
  conversion_min_per_day = 1440 min_per_day; conversion_min_per_day is "conversion factor min to hours";  // SBO:0000002
  simmets_inhibitor_activity = 0.5 dimensionless; simmets_inhibitor_activity is "HMG-CoA Reductase inhibitor activity of simmets";  // SBO:0000261
  Mr_ldlc = 386.654 g_per_mole; Mr_ldlc is "Molecular weight cho [g/mole]";  // SBO:0000647
  v_cho_ref = 1000 mg_per_day; v_cho_ref is "reference cholesterol turnover [mg/day]";  // SBO:0000485
  SYNTHESIS_HMG_Vmax = 0.001 mmole_per_min_l; SYNTHESIS_HMG_Vmax is "Protein synthesis Vmax for HMGR and HMGS";  // SBO:0000186
  DEGRADATION_HMG_Vmax = 0.0003 mmole_per_min_l; DEGRADATION_HMG_Vmax is "Protein degradation Vmax for HMGR and HMGS";  // SBO:0000186
  HMG_kr_cho = 0.02 mM; HMG_kr_cho is "Protein regulation kr for HMGR and HMGS";  // SBO:0000261
  SYNTHESIS_LDLR_Vmax = 0.001 mmole_per_min_l; SYNTHESIS_LDLR_Vmax is "Protein synthesis Vmax for LDLR";  // SBO:0000186
  DEGRADATION_LDLR_Vmax = 0.0003 mmole_per_min_l; DEGRADATION_LDLR_Vmax is "Protein degradation Vmax for LDLR";  // SBO:0000186
  LDLR_kr_cho = 0.02 mM; LDLR_kr_cho is "Protein regulation kr for LDLR";  // SBO:0000261
  SYNTHESIS_LDLR_Vmax_f = 1 dimensionless; SYNTHESIS_LDLR_Vmax_f is "scaling factor for synthesis Vmax for LDL-R";  // SBO:0000002
  DEGRADATION_LDLR_Vmax_f = 1 dimensionless; DEGRADATION_LDLR_Vmax_f is "scaling factor for degradation Vmax for LDL-R";  // SBO:0000002
  ldlr_total has dimensionless; ldlr_total is "Total LDLR";
  ldlr_fraction has dimensionless; ldlr_fraction is "LDLR fraction";
  ldlr_membrane_fraction has dimensionless; ldlr_membrane_fraction is "LDLR membrane fraction";
  ldlr_ldlc_fraction has dimensionless; ldlr_ldlc_fraction is "LDLR-LDLC fraction";
  Mr_cho has g_per_mole; Mr_cho is "Molecular weight cho [g/mole]";
  v_cho_reference has mmole_per_min; v_cho_reference is "reference cholesterol turnover [mmole/min]";
  v_diet has mg_per_day; v_diet is "total dietary cholesterol";
  v_synthesis has mg_per_day; v_synthesis is "total synthesized cholesterol";
  v_uptake has mg_per_day; v_uptake is "cholesterol uptake (LDL receptor)";
  v_export has mg_per_day; v_export is "cholesterol export (VLDL)";
  v_reference has mg_per_day; v_reference is "cholesterol reference flux";
  v_net_export has mg_per_day; v_net_export is "cholesterol net export (VLDL)";
  v_liver_balance has mg_per_day; v_liver_balance is "cholesterol net export (VLDL)";
  v_loss has mg_per_day; v_loss is "total loss of cholesterol in the feces";
  TURNOVER_LDLR has mmole_per_min; TURNOVER_LDLR is "total turnover of LDL-R expression";
  active_inhibitors has mM; active_inhibitors is "active HMG-CoA reductase inhbitors in liver";
  SIMVAIMP_Km = 0.0097 mM; SIMVAIMP_Km is "Km for simvastatin import";  // SBO:0000322
  SIMVAIMP_f = 100 dimensionless; SIMVAIMP_f is "scaling for simvastatin import";  // SBO:0000002
  // Km for simvastatin acid 3.6 µM (Chen et al., 2005)
  SIMACIDIMP_Km = 0.0036 mM; SIMACIDIMP_Km is "Km for simvastatin acid import";  // SBO:0000322
  SIMACIDIMP_f = 100 dimensionless; SIMACIDIMP_f is "scaling for simvastatin acid import";  // SBO:0000002
  // Assuming similar transport Km then simva and simacid via OATP1B1. Simvastatin acid 3.6 µM (Nakai et al., 2001; Chen et al., 2005). Simvastatin lactone 9.7 µM (Chen et al., 2005).
  SIMMETSIMP_Km = 0.0067 mM; SIMMETSIMP_Km is "Km for simvastatin metabolites import";  // SBO:0000322
  SIMMETSIMP_f = 100 dimensionless; SIMMETSIMP_f is "scaling for simvastatin metabolites import";  // SBO:0000002
  ESTERASE_Km = 0.0008 mM; ESTERASE_Km is "Km esterase";  // SBO:0000322
  ESTERASE_f = 1 dimensionless; ESTERASE_f is "scaling esterase";  // SBO:0000002
  SIMACID_CYP3A4_f = 1 dimensionless; SIMACID_CYP3A4_f is "scaling of simacid conversion relative to simva";  // SBO:0000002
  EHC_simmets_k = 0.1 per_min; EHC_simmets_k is "rate of EHC for simvastatin metabolites";  // SBO:0000009
  // +1.0 [g/day] cholesterol uptake diet
  cho_diet_k = 1 dimensionless; cho_diet_k is "rate of cholesterol uptake from diet";  // SBO:0000009
  // -1.2 [g/day] loss feces
  cho_loss_k = 1.2 dimensionless; cho_loss_k is "rate of cholesterol loss in feces";  // SBO:0000009
  LDLCEXP_Vmax = 2.8 dimensionless; LDLCEXP_Vmax is "Vmax cholesterol export";  // SBO:0000186
  LDLCEXP_Km = 0.02 mM; LDLCEXP_Km is "Km cholesterol export";  // SBO:0000322
  LDLRLDLCIMP_Kcat = 2 dimensionless;  // SBO:0000025
  // Set to 3mM for reference state of 3mM in healthy patient as 3mM plasma LDL-C.
  LDLRLDLCIMP_Km = 3 mM; LDLRLDLCIMP_Km is "Km LDLR-LDLC binding";  // SBO:0000322
  LDLRLDLCIMP_Km_f = 1 dimensionless;  // SBO:0000002
  LDLRLDLCIMP_Kcat_f = 1 dimensionless;  // SBO:0000002
  LDLRMEMBRANE_Kcat = 0.0013 mmole_per_min_l;  // SBO:0000025
  LDLRMEMBRANE_Kcat_f = 1 dimensionless;  // SBO:0000002
  LDLRRECYCLING_Kcat = 0.0014 mmole_per_min_l;  // SBO:0000025
  LDLRRECYCLING_Kcat_f = 1 dimensionless;  // SBO:0000002
  // higher then HMG-CoA Reductase: 3E-3 [mmole/min/l] /1.4 [l]/ 0.03 [mole/l] = 71.4E-3 [1/min]
  HMGCOASYNTHASE_Kcat = 350 l_per_mmole;  // SBO:0000025
  // product inhibition ~ reference concentration
  HMGCOASYNTHASE_Ki_hmgcoa = 0.022 mM;  // SBO:0000261
  HMGCOAREDUCTASE_Kcat = 1 dimensionless;  // SBO:0000025
  // 4 [µM] Istvan2001
  HMGCOAREDUCTASE_Km = 0.004 mM; HMGCOAREDUCTASE_Km is "Km HMG-CoA";  // SBO:0000322
  // 0.1 - 2.3 [nM] Istvan2001, 0.12 nM [Corsini1995]
  HMGCOAREDUCTASE_Ki_simacid = 1.2e-7 mM; HMGCOAREDUCTASE_Ki_simacid is "Ki HMG-CoA for simvastatin acid and simvastatin metabolites";  // SBO:0000261

  // Assignment rules:
  ldlr_total := ldlr + ldlr_membrane + ldlr_ldlc;
  ldlr_fraction := ldlr/ldlr_total;
  ldlr_membrane_fraction := ldlr_membrane/ldlr_total;
  ldlr_ldlc_fraction := ldlr_ldlc/ldlr_total;
  Mr_cho := Mr_ldlc;
  v_cho_reference := v_cho_ref/Mr_ldlc/conversion_min_per_day;
  v_diet := cho_diet*Mr_cho*conversion_min_per_day;
  v_synthesis := HMGCOAREDUCTASE*Mr_cho*conversion_min_per_day;
  v_uptake := LDLRLDLCIMP*Mr_cho*conversion_min_per_day;
  v_export := LDLCEXP*Mr_cho*conversion_min_per_day;
  v_reference := v_cho_reference*Mr_cho*conversion_min_per_day;
  v_net_export := v_export - v_uptake;
  v_liver_balance := v_diet + v_synthesis + v_uptake - v_export - v_loss;
  v_loss := cho_loss*Mr_cho*conversion_min_per_day;
  TURNOVER_LDLR := SYNTHESIS_LDLR - DEGRADATION_LDLR;
  active_inhibitors := simacid + simmets_inhibitor_activity*simmets;

  // Reactions:
  SIMVAIMP: $simva_ext -> simva; Vli*SIMVA_CYP3A4LI_Vmax*SIMVAIMP_f/SIMVAIMP_Km*(simva_ext - simva)/(1 + simva_ext/SIMVAIMP_Km + simva/SIMVAIMP_Km); SIMVAIMP is "SV import";  // SBO:0000655
  SIMACIDIMP: simacid -> simacid_ext; Vli*SIMVA_CYP3A4LI_Vmax*SIMACIDIMP_f/SIMACIDIMP_Km*(simacid - simacid_ext)/(1 + simacid_ext/SIMACIDIMP_Km + simacid/SIMACIDIMP_Km); SIMACIDIMP is "SVA export (OATP1B1)";  // SBO:0000655
  SIMMETSIMP: simmets -> simmets_ext; Vli*SIMVA_CYP3A4LI_Vmax*SIMMETSIMP_f/SIMMETSIMP_Km*(simmets - simmets_ext)/(1 + simmets_ext/SIMMETSIMP_Km + simmets/SIMMETSIMP_Km); SIMMETSIMP is "SVM export (OATP1B1)";  // SBO:0000655
  // [Fukami2010] Ki, 0.8 +- 0.1 (human liver microsomes)
  ESTERASE: simva => simacid; Vli*SIMVA_CYP3A4LI_Vmax*ESTERASE_f*simva/(simva + ESTERASE_Km); ESTERASE is "Esterase: SV to SVA";  // SBO:0000176
  SIMVA_CYP3A4: simva => simmets; Vli*SIMVA_CYP3A4LI_Vmax*simva/(simva + CYP3A4_Km); SIMVA_CYP3A4 is "CYP3A4: SV to SVM";  // SBO:0000176
  SIMACID_CYP3A4: simacid => simmets; Vli*SIMVA_CYP3A4LI_Vmax*SIMACID_CYP3A4_f*simacid/(simacid + CYP3A4_Km); SIMACID_CYP3A4 is "CYP3A4: SVA to SVM";  // SBO:0000176
  EHC_simmets: simmets => simmets_gu; EHC_simmets_k*Vli*simmets; EHC_simmets is "EHC SVM";  // SBO:0000655
  cho_diet: => cho; cho_diet_k*v_cho_reference; cho_diet is "dietary cholesterol uptake";
  cho_loss: cho => ; cho_loss_k*v_cho_reference; cho_loss is "fecal cholesterol loss";
  LDLCEXP: cho => $ldlc_ext; LDLCEXP_Vmax*v_cho_reference*cho/(cho + LDLCEXP_Km); LDLCEXP is "cholesterol export";  // SBO:0000655
  LDLRLDLCIMP: $ldlc_ext + ldlr_membrane => ldlr_ldlc; v_cho_reference*LDLRLDLCIMP_Kcat*LDLRLDLCIMP_Kcat_f*ldlr_membrane*ldlc_ext/(LDLRLDLCIMP_Km*LDLRLDLCIMP_Km_f + ldlc_ext); LDLRLDLCIMP is "LDLR-LDLC binding & internalization";  // SBO:0000655
  LDLR_TO_MEMBRANE: ldlr => ldlr_membrane; Vli*LDLRMEMBRANE_Kcat*LDLRMEMBRANE_Kcat_f*ldlr; LDLR_TO_MEMBRANE is "LDLR membrane transport";  // SBO:0000655
  LDLRRECYCLING: ldlr_ldlc => ldlr + cho; Vli*LDLRRECYCLING_Kcat*LDLRRECYCLING_Kcat_f*ldlr_ldlc; LDLRRECYCLING is "LDLR recycling";  // SBO:0000655
  HMGCOASYNTHASE: 3 $acoa => hmgcoa; HMGCOASYNTHASE_Kcat*v_cho_reference*hmgcoasynthase*acoa/(1 + hmgcoa/HMGCOASYNTHASE_Ki_hmgcoa); HMGCOASYNTHASE is "HMG-CoA synthase";  // modifiers: hmgcoasynthase; SBO:0000176
  HMGCOAREDUCTASE: 6 hmgcoa => cho; HMGCOAREDUCTASE_Kcat*v_cho_reference*hmgcoareductase*hmgcoa/(HMGCOAREDUCTASE_Km*(1 + (simacid + simmets_inhibitor_activity*simmets)/HMGCOAREDUCTASE_Ki_simacid) + hmgcoa); HMGCOAREDUCTASE is "HMG-CoA reductase";  // modifiers: simacid, simmets, hmgcoareductase; SBO:0000176
  SYNTHESIS_HMGCOAREDUCTASE: => hmgcoareductase; SYNTHESIS_HMG_Vmax*Vli/(1 + cho/HMG_kr_cho); SYNTHESIS_HMGCOAREDUCTASE is "HMGCOAREDUCTASE synthesis";  // modifiers: cho; SBO:0000176
  DEGRADATION_HMGCOAREDUCTASE: hmgcoareductase => ; DEGRADATION_HMG_Vmax*hmgcoareductase*Vli*(1 + cho/HMG_kr_cho); DEGRADATION_HMGCOAREDUCTASE is "HMGCOAREDUCTASE degradation";  // modifiers: cho; SBO:0000176
  SYNTHESIS_HMGCOASYNTHASE: => hmgcoasynthase; SYNTHESIS_HMG_Vmax*Vli/(1 + cho/HMG_kr_cho); SYNTHESIS_HMGCOASYNTHASE is "HMGCOASYNTHASE synthesis";  // modifiers: cho; SBO:0000176
  DEGRADATION_HMGCOASYNTHASE: hmgcoasynthase => ; DEGRADATION_HMG_Vmax*hmgcoasynthase*Vli*(1 + cho/HMG_kr_cho); DEGRADATION_HMGCOASYNTHASE is "HMGCOASYNTHASE degradation";  // modifiers: cho; SBO:0000176
  SYNTHESIS_LDLR: => ldlr; Vli*SYNTHESIS_LDLR_Vmax*SYNTHESIS_LDLR_Vmax_f/(1 + cho/LDLR_kr_cho); SYNTHESIS_LDLR is "LDLR synthesis";  // modifiers: cho; SBO:0000176
  DEGRADATION_LDLR: ldlr => ldlr_degraded; Vli*DEGRADATION_LDLR_Vmax*DEGRADATION_LDLR_Vmax_f*ldlr*(1 + cho/LDLR_kr_cho); DEGRADATION_LDLR is "LDLR degradation";  // modifiers: cho; SBO:0000176

  // Unit definitions:
  unit g_per_mole = gram / mole; g_per_mole is "g/mole";
  unit kg = 1000 gram; kg is "kilogram";
  unit l_per_min = litre / (60 second); l_per_min is "l/min";
  unit l_per_min_kg = litre / (60 second * 1000 gram); l_per_min_kg is "l/min/kg";
  unit l_per_mmole = litre / (1e-3 mole); l_per_mmole is "l/mmole";
  unit m2 = metre^2; m2 is "meter^2";
  unit mM = 1e-3 mole / litre; mM is "mmole/liter";
  unit mg_per_day = 1e-3 gram / (86400 second); mg_per_day is "mg/day";
  unit min = 60 second;
  unit min_per_day = 60 second / (86400 second); min_per_day is "min/day";
  unit mmole = 1e-3 mole;
  unit mmole_per_min = 1e-3 mole / (60 second); mmole_per_min is "mmole/min";
  unit mmole_per_min_l = 1e-3 mole / (60 second * litre); mmole_per_min_l is "mmole/min/l";
  unit per_min = 1 / (60 second); per_min is "1/min";
  unit per_mmole = 1 / (1e-3 mole); per_mmole is "1/mmole";
end
